OpenVSP model (file version 5), 46 components.
Geometry view with OpenVSP parameter names; values to 6 digits, angles in degrees, lengths in the model's unit.
Overall bounding box: X_Min=-13.1718 X_Len=29.6456 Y_Min=-23.6802 Y_Len=47.3606 Z_Min=-4.65913 Z_Len=11.5276

Fuselage "Fuselage"
  location (X Y Z) -11.887 0 -1.15913, rotation 0 0 0
  bounding box size 27.3536 5.83621 5.55516
  Design: Length=27
  cross sections:
    n  XLocPercent  YLocPercent  ZLocPercent  shape
    0  0            0            0            circle Circle_Diameter=0.5
    1  0.0741408    0            0.0111111    rounded rectangle RoundRectXSec_Radius=0.2 RoundedRect_Height=2.8 RoundedRect_Width=3.25
    2  0.197709     0            0.0434783    rounded rectangle RoundRectXSec_Radius=1.5 RoundedRect_Height=5.5 RoundedRect_Width=5.5
    3  0.411455     0            0.0434783    rounded rectangle RoundRectXSec_Radius=1.5 RoundedRect_Height=5.55516 RoundedRect_Width=5.5
    4  0.644632     0            0.0833333    rounded rectangle RoundRectXSec_Radius=1.25 RoundedRect_Height=3 RoundedRect_Width=3.5
    5  1            0            0.111111     circle Circle_Diameter=0.5

Fuselage "Turboshaft", child of "Fuselage"
  location (X Y Z) 2.56954 0 1.34087, rotation 0 0 0; relative location 14.4565 0 2.5, rotation 0 0 0
  bounding box size 3.23706 1.583 1.583
  Design: Length=3
  cross sections:
    n  XLocPercent  YLocPercent  ZLocPercent  shape
    0  0            0            0            point
    1  0.05         0            0            ellipse Ellipse_Height=1.583 Ellipse_Width=1.583
    2  0.5          0            0            as above
    3  0.95         0            0            as above
    4  1            0            0            point

Fuselage "FuelTank_1", child of "Fuselage"
  location (X Y Z) -10.6479 0 -1.06194, rotation 0 0 0; relative location 1.23913 0 0.0971929, rotation 0 0 0
  bounding box size 3.15 1 1
  Design: Length=3.15
  cross sections:
    n  XLocPercent  YLocPercent  ZLocPercent  shape
    0  0            0            0            point
    1  0.013587     0            0            rounded rectangle RoundRectXSec_Radius=0.1 RoundedRect_Height=1 RoundedRect_Width=1
    2  0.5          0            0            as above
    3  0.986413     0            0            as above
    4  1            0            0            point

Fuselage "FuelTank_2", child of "Fuselage"
  location (X Y Z) 2.55601 0 0.264148, rotation 0 90 0; relative location 14.443 0 1.42328, rotation 0 90 0
  bounding box size 2 2 1.25
  Design: Length=1.25
  cross sections:
    n  XLocPercent  YLocPercent  ZLocPercent  shape
    0  0            0            0            point
    1  0.013587     0            0            rounded rectangle RoundRectXSec_Radius=0.1 RoundedRect_Height=2 RoundedRect_Width=2
    2  0.5          0            0            as above
    3  0.986413     0            0            as above
    4  1            0            0            point

Wing "LandingGear_Nose", child of "Fuselage"
  location (X Y Z) -8.88698 0 -2.20913, rotation -90 0 0; relative location 3 0 -1.05, rotation -90 0 0
  bounding box size 1.40611 0.104467 1.98069
  totals: TotalSpan=1.5 TotalProjectedSpan=1.5 TotalChord=0.875 TotalArea=1.3125 TotalAR=1.71429
  root: chord 0.75, twist 0, airfoil file "NACA0010"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 BaseThickChord=0.100027 ThickChord=0.100027
  sections:
    n  Span  Root_Chord  Tip_Chord  Area    Sweep  Sweep_Location  Dihedral  Twist  Twist_Location  tip airfoil
    1  1.5   0.75        1          1.3125  15     0               0         0      0.25            as above

Wing "LandingGear_Main", child of "Fuselage"
  location (X Y Z) -1.97167 1.84783 -2.20913, rotation -59.7608 0 0; relative location 9.91531 1.84783 -1.05, rotation -59.7608 0 0
  symmetric about XZ
  bounding box size 2.91851 5.3132 2.48193
  totals: TotalSpan=4.31256 TotalProjectedSpan=4.07984 TotalChord=1.85898 TotalArea=8.25095 TotalAR=2.01736
  root: chord 2.21615, twist 0, airfoil file "NACA0018"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 BaseThickChord=0.180066 ThickChord=0.180066
  sections:
    n  Span      Root_Chord  Tip_Chord  Area     Sweep    Sweep_Location  Dihedral  Twist  Twist_Location  tip airfoil
    1  1.28776   2.21615     2.0599     2.75326  22.3636  0               0         0      0.25            as above
    2  0.868518  2.0599      1.1        1.37221  55.9318  0               -30       0      0.25            as above

Pod "LandingGear_005.fronttire", child of "Fuselage"
  location (X Y Z) -7.88698 -0.238095 -4.05913, rotation 0 0 90; relative location 4 -0.238095 -2.9, rotation 0 0 90
  bounding box size 1.2 0.6 1.2
  Design: FineRatio=1 Length=0.6

BodyOfRevolution "NoseWheel", child of "Fuselage"
  location (X Y Z) -7.91742 0 -4.05913, rotation 0 0 90; relative location 3.96957 0 -2.9, rotation 0 0 90
  bounding box size 1.2 0.3333 1.2
  Design: A0=0 Ae=0 Amin=0 AminW=0 Angle=0 Diameter=2 Mode=1
  profile: rounded rectangle DeltaX=-0.5 RoundRectXSec_Radius=0.16665 RoundedRect_Height=1.2 RoundedRect_Width=0.3333

Pod "LandingGear_010.maintires", child of "Fuselage"
  location (X Y Z) 0.752805 2.3 -4.05913, rotation 0 0 90; relative location 12.6398 2.3 -2.9, rotation 0 0 90
  symmetric about XZ
  bounding box size 1.2 5.8 1.2
  Design: FineRatio=1 Length=0.6

BodyOfRevolution "MainWheel", child of "Fuselage"
  location (X Y Z) 0.753018 2.5 -4.05913, rotation 0 0 90; relative location 12.64 2.5 -2.9, rotation 0 0 90
  symmetric about XZ
  bounding box size 1.2 5.333 1.2
  Design: A0=0 Ae=0 Amin=0 AminW=0 Angle=0 Diameter=2 Mode=1
  profile: rounded rectangle DeltaX=-0.5 RoundRectXSec_Radius=0.08325 RoundedRect_Height=1.2 RoundedRect_Width=0.333

Human "HumanGeom", child of "Fuselage"
  location (X Y Z) -5.28698 -1.25 0.0834051, rotation 0 0 0; relative location 6.6 -1.25 1.24254, rotation 0 0 0
  mass: Density=67.9173 Shell_Flag=0 Mass_Area=1 Mass_Prior=0
  Anthropometric: Age=30 AutoDensity=1 BMI=21.8176 BMI_pct=0.0847851 GenderFlag=0 LenUnit=4 Mass=148.317 MassUnit=3 SitFrac=0.51 Stature=5.76115 Stature_pct=0.5 Volume=2.18379

Human "HumanGeom", child of "Fuselage"
  location (X Y Z) -5.28698 1.25 0.0834051, rotation 0 0 0; relative location 6.6 1.25 1.24254, rotation 0 0 0
  mass: Density=67.9173 Shell_Flag=0 Mass_Area=1 Mass_Prior=0
  Anthropometric: Age=30 AutoDensity=1 BMI=21.8176 BMI_pct=0.0847851 GenderFlag=0 LenUnit=4 Mass=148.317 MassUnit=3 SitFrac=0.51 Stature=5.76115 Stature_pct=0.5 Volume=2.18379

Human "HumanGeom", child of "Fuselage"
  location (X Y Z) -2.28698 -1.25 0.0834051, rotation 0 0 0; relative location 9.6 -1.25 1.24254, rotation 0 0 0
  mass: Density=67.9173 Shell_Flag=0 Mass_Area=1 Mass_Prior=0
  Anthropometric: Age=30 AutoDensity=1 BMI=21.8176 BMI_pct=0.0847851 GenderFlag=0 LenUnit=4 Mass=148.317 MassUnit=3 SitFrac=0.51 Stature=5.76115 Stature_pct=0.5 Volume=2.18379

Human "HumanGeom", child of "Fuselage"
  location (X Y Z) -2.28698 1.25 0.0834051, rotation 0 0 0; relative location 9.6 1.25 1.24254, rotation 0 0 0
  mass: Density=67.9173 Shell_Flag=0 Mass_Area=1 Mass_Prior=0
  Anthropometric: Age=30 AutoDensity=1 BMI=21.8176 BMI_pct=0.0847851 GenderFlag=0 LenUnit=4 Mass=148.317 MassUnit=3 SitFrac=0.51 Stature=5.76115 Stature_pct=0.5 Volume=2.18379

Human "HumanGeom", child of "Fuselage"
  location (X Y Z) 0.963018 -1.25 0.0834051, rotation 0 0 0; relative location 12.85 -1.25 1.24254, rotation 0 0 0
  mass: Density=67.9173 Shell_Flag=0 Mass_Area=1 Mass_Prior=0
  Anthropometric: Age=30 AutoDensity=1 BMI=21.8176 BMI_pct=0.0847851 GenderFlag=0 LenUnit=4 Mass=148.317 MassUnit=3 SitFrac=0.51 Stature=5.76115 Stature_pct=0.5 Volume=2.18379

Human "HumanGeom", child of "Fuselage"
  location (X Y Z) 0.963018 1.25 0.0834051, rotation 0 0 0; relative location 12.85 1.25 1.24254, rotation 0 0 0
  mass: Density=67.9173 Shell_Flag=0 Mass_Area=1 Mass_Prior=0
  Anthropometric: Age=30 AutoDensity=1 BMI=21.8176 BMI_pct=0.0847851 GenderFlag=0 LenUnit=4 Mass=148.317 MassUnit=3 SitFrac=0.51 Stature=5.76115 Stature_pct=0.5 Volume=2.18379

Wing "Tail_1", child of "Fuselage"
  location (X Y Z) 9.28846 0 1.7178, rotation 90 0 0; relative location 21.1754 0 2.87693, rotation 90 0 0
  bounding box size 7.18534 1.17516 4.9
  totals: TotalSpan=4.9 TotalProjectedSpan=4.9 TotalChord=3.62 TotalArea=15.9154 TotalAR=1.5086
  root: chord 5.87239, twist 0, airfoil file "NACA0020"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 BaseThickChord=0.200023 ThickChord=0.200023
  sections:
    n  Span      Root_Chord  Tip_Chord  Area     Sweep  Sweep_Location  Dihedral  Twist  Twist_Location  tip airfoil
    1  0.984878  5.87239     3.80882    4.7674   15     1               0         0      0.25            as above
    2  0.368613  3.80882     3.46256    1.34016  15     1               0         0      0.25            as above
    3  0.448719  3.46256     3.17401    1.48898  15     1               0         0      0.25            as above
    4  3.09779   3.17401     2.19683    8.31887  15     1               0         0      0.25            as above
  SS_Control "Rudder": UStart=0.33 UEnd=0.833333 Length_C_Start=0.3 Length_C_End=0.3 Length_Start=1.15503 Length_End=0.659049 LE_Flag=0 Surf_Type=2

Wing "Tail_2", child of "Fuselage"
  location (X Y Z) 10.8014 0 2.06128, rotation 0 0 0; relative location 22.6884 0 3.22041, rotation 0 0 0
  symmetric about XZ
  bounding box size 4.3 14 1.03248
  totals: TotalSpan=14 TotalProjectedSpan=14 TotalChord=3.28571 TotalArea=46 TotalAR=4.26087
  root: chord 4.3, twist 0, airfoil file "NACA0024"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 BaseThickChord=0.240088 ThickChord=0.240088
  sections:
    n  Span  Root_Chord  Tip_Chord  Area  Sweep  Sweep_Location  Dihedral  Twist  Twist_Location  tip airfoil
    1  7     4.3         2.27143    23    0      0.25            0         0      0.25            airfoil file "NACA0010"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 BaseThickChord=0.100027 ThickChord=0.100027
  SS_Control "Elevator": UStart=0.366667 UEnd=0.633333 Length_C_Start=0.4 Length_C_End=0.4 Length_Start=1.63886 Length_End=0.989714 LE_Flag=0 Surf_Type=2

Wing "Wing", child of "Fuselage"
  location (X Y Z) -5.58698 0 2.26128, rotation 0 0 0; relative location 6.3 0 3.42041, rotation 0 0 0
  symmetric about XZ
  bounding box size 4.1 38 0.98446
  totals: TotalSpan=38 TotalProjectedSpan=38 TotalChord=3.98503 TotalArea=151.431 TotalAR=9.53568
  root: chord 3.87006, twist 0, airfoil file "NACA0024"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 BaseThickChord=0.240088 ThickChord=0.240088
  sections:
    n  Span  Root_Chord  Tip_Chord  Area     Sweep  Sweep_Location  Dihedral  Twist  Twist_Location  tip airfoil
    1  9     3.87006     4.1        35.8653  0      0.25            0         0      0.25            as above
    2  10    4.1         3.87006    39.8503  0      0.25            0         0      0.25            airfoil file "NACA0010"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 BaseThickChord=0.100027 ThickChord=0.100027
  SS_Control "Inboard_Flaperon": UStart=0.339722 UEnd=0.461111 Length_C_Start=0.3 Length_C_End=0.3 Length_Start=1.18578 Length_End=1.21927 LE_Flag=0 Surf_Type=2
  SS_Control "Midboard_Flaperon": UStart=0.52675 UEnd=0.63125 Length_C_Start=0.3 Length_C_End=0.3 Length_Start=1.22262 Length_End=1.19378 LE_Flag=0 Surf_Type=2
  SS_Control "Outboard_Flaperon": UStart=0.6455 UEnd=0.731 Length_C_Start=0.75 Length_C_End=0.75 Length_Start=2.97463 Length_End=2.91565 LE_Flag=0 Surf_Type=2

Blank "Pivot_1", child of "Wing"
  location (X Y Z) -4.61947 -19.073 2.26128, rotation 0 0 0; relative location 0.967516 -19.073 0, rotation 0 0 0

Blank "Hub_1", child of "Pivot_1"
  location (X Y Z) -8.06456 -19.073 2.26128, rotation 0 0 0; relative location -3.44509 0 0, rotation 0 0 0

Propeller "Prop_1", child of "Hub_1"
  location (X Y Z) -8.06456 -19.073 2.26128, rotation 0 0 0; relative location 0 0 0, rotation 0 0 0
  bounding box size 0.39185 9.21431 9.21431
  Design: Diameter=9.1869 NumBlade=8 Beta34=20 UseBeta34Flag=1 Feather=3.30904 Rotate=0 Precone=0 ReverseFlag=1 FoldAngle=0 PropMode=0 AF=51.7341 CLi=0.539797 Chord=0.0849227 Solidity=0.216254 ConstructXoC=0.507874 FeatherAxisXoC=0.5 FeatherOffsetXoC=0
  cross sections:
    n  RadiusFrac  shape
    0  0.15        ellipse Ellipse_Height=0.0660856 Ellipse_Width=0.550713
    1  0.4         NACA 16-series Chord=0.456228 IdealCl=0.7 ThickChord=0.12
    2  1           NACA 16-series Chord=0.229464 IdealCl=0.2 ThickChord=0.12
  Chord along r/R (linear): 0.15: 0.119891, 1: 0.0499545
  Twist along r/R (cubic Bezier): 0.15: 41.6271, 0.185417: 42.3167, 0.220833: 37.8335, 0.25625: 34.1794, 0.291667: 30.5254, 0.327083: 28.2484, 0.3625: 26.4162, 0.433333: 22.752, 0.504167: 20.9509, 0.575: 19.4972, 0.716667: 16.59, 0.858333: 15.4417, 1: 14.4812
  Thick along r/R (linear): 0.15: 0.12, 1: 0.12
  CLI along r/R (cubic Bezier): 0.15: 0, 0.233333: 0.7, 0.316667: 0.7, 0.4: 0.7, 0.466667: 0.7, 0.533333: 0.7, 0.6: 0.7, 0.733333: 0.7, 0.866667: 0.7, 1: 0.2

Fuselage "Nacelle_1", child of "Hub_1"
  location (X Y Z) -9.76419 -19.073 2.26128, rotation 0 0 0; relative location -1.69963 0 0, rotation 0 0 0
  bounding box size 7.67135 1.44694 1.44694
  Design: Length=7.6
  cross sections:
    n  XLocPercent  YLocPercent  ZLocPercent  shape
    0  0            0            0            circle Circle_Diameter=0.344509
    1  0.3          0            0            ellipse Ellipse_Height=1.44694 Ellipse_Width=1.44694
    2  0.5          0            0            as above
    3  1            0            0            point

Blank "Pivot_2", child of "Wing"
  location (X Y Z) -8.75357 -8.908 2.26128, rotation 0 90 0; relative location -3.16659 -8.908 0, rotation -180 90 -180

Blank "Hub_2", child of "Pivot_2"
  location (X Y Z) -10.1316 -8.908 4.558, rotation 0 90 0; relative location -2.29673 0 -1.37804, rotation 0 0 0

Propeller "Prop_2", child of "Hub_2"
  location (X Y Z) -11.9187 -8.908 1.808, rotation 0 0 0; relative location 2.75 0 -1.78707, rotation 0 -90 0
  bounding box size 0.39185 9.21431 9.21431
  Design: Diameter=9.1869 NumBlade=8 Beta34=20 UseBeta34Flag=1 Feather=3.30904 Rotate=0 Precone=0 ReverseFlag=0 FoldAngle=0 PropMode=0 AF=51.7341 CLi=0.539797 Chord=0.0849227 Solidity=0.216254 ConstructXoC=0.5 FeatherAxisXoC=0.5 FeatherOffsetXoC=0
  cross sections:
    n  RadiusFrac  shape
    0  0.15        ellipse Ellipse_Height=0.0660856 Ellipse_Width=0.550713
    1  0.4         NACA 16-series Chord=0.456228 IdealCl=0.7 ThickChord=0.12
    2  1           NACA 16-series Chord=0.229464 IdealCl=0.2 ThickChord=0.12
  blade curves as in "Prop_1"

Fuselage "Nacelle_2", child of "Hub_2"
  location (X Y Z) -13.1002 -8.908 1.758, rotation 0 0 0; relative location 2.8 0 -2.96864, rotation 0 -90 0
  bounding box size 4.1168 1.44694 1.44694
  Design: Length=4.04545
  cross sections:
    n  XLocPercent  YLocPercent  ZLocPercent  shape
    0  0            0            0            circle Circle_Diameter=0.344509
    1  0.3          0            0            ellipse Ellipse_Height=1.44694 Ellipse_Width=1.44694
    2  1            0            0            as above

Blank "Pivot_3", child of "Wing"
  location (X Y Z) -8.75357 8.908 2.26128, rotation 0 90 0; relative location -3.16659 8.908 0, rotation -180 90 -180

Blank "Hub_3", child of "Pivot_3"
  location (X Y Z) -10.1316 8.908 4.558, rotation 0 90 0; relative location -2.29673 0 -1.37804, rotation 0 0 0

Propeller "Prop_3", child of "Hub_3"
  location (X Y Z) -11.9185 8.908 1.808, rotation 0 0 0; relative location 2.75 0 -1.78687, rotation 0 -90 0
  bounding box size 0.39185 9.21431 9.21431
  Design: Diameter=9.1869 NumBlade=8 Beta34=20 UseBeta34Flag=1 Feather=3.30904 Rotate=0 Precone=0 ReverseFlag=1 FoldAngle=0 PropMode=0 AF=51.7341 CLi=0.539797 Chord=0.0849227 Solidity=0.216254 ConstructXoC=0.5 FeatherAxisXoC=0.5 FeatherOffsetXoC=0
  cross sections:
    n  RadiusFrac  shape
    0  0.15        ellipse Ellipse_Height=0.0660856 Ellipse_Width=0.550713
    1  0.4         NACA 16-series Chord=0.456228 IdealCl=0.7 ThickChord=0.12
    2  1           NACA 16-series Chord=0.229464 IdealCl=0.2 ThickChord=0.12
  blade curves as in "Prop_1"

Fuselage "Nacelle_3", child of "Hub_3"
  location (X Y Z) -13.1005 8.908 1.758, rotation 0 0 0; relative location 2.8 0 -2.96887, rotation 0 -90 0
  bounding box size 4.1168 1.44694 1.44694
  Design: Length=4.04545
  cross sections:
    n  XLocPercent  YLocPercent  ZLocPercent  shape
    0  0            0            0            circle Circle_Diameter=0.344509
    1  0.3          0            0            ellipse Ellipse_Height=1.44694 Ellipse_Width=1.44694
    2  1            0            0            as above

Blank "Pivot_4", child of "Wing"
  location (X Y Z) -4.61947 19.0733 2.26128, rotation 0 0 0; relative location 0.967516 19.0733 0, rotation 0 0 0

Blank "Hub_4", child of "Pivot_4"
  location (X Y Z) -8.06456 19.0733 2.26128, rotation 0 0 0; relative location -3.44509 0 0, rotation 0 0 0

Propeller "Prop_4", child of "Hub_4"
  location (X Y Z) -8.06456 19.0733 2.26128, rotation 0 0 0; relative location 0 0 0, rotation 0 0 0
  bounding box size 0.39185 9.21431 9.21431
  Design: Diameter=9.1869 NumBlade=8 Beta34=20 UseBeta34Flag=1 Feather=3.30904 Rotate=0 Precone=0 ReverseFlag=0 FoldAngle=0 PropMode=0 AF=51.7341 CLi=0.539797 Chord=0.0849227 Solidity=0.216254 ConstructXoC=0.5 FeatherAxisXoC=0.5 FeatherOffsetXoC=0
  cross sections:
    n  RadiusFrac  shape
    0  0.15        ellipse Ellipse_Height=0.0660856 Ellipse_Width=0.550713
    1  0.4         NACA 16-series Chord=0.456228 IdealCl=0.7 ThickChord=0.12
    2  1           NACA 16-series Chord=0.229464 IdealCl=0.2 ThickChord=0.12
  blade curves as in "Prop_1"

Fuselage "Nacelle_4", child of "Hub_4"
  location (X Y Z) -9.76413 19.0733 2.26128, rotation 0 0 0; relative location -1.69958 0 0, rotation 0 0 0
  bounding box size 7.67135 1.44694 1.44694
  Design: Length=7.6
  cross sections:
    n  XLocPercent  YLocPercent  ZLocPercent  shape
    0  0            0            0            circle Circle_Diameter=0.344509
    1  0.3          0            0            ellipse Ellipse_Height=1.44694 Ellipse_Width=1.44694
    2  0.5          0            0            as above
    3  1            0            0            point

Blank "Hub_5", child of "Wing"
  location (X Y Z) 1.81137 -8.908 3.86898, rotation 0 90 0; relative location 7.39835 -8.908 1.60771, rotation 0 90 0

Propeller "Prop_5", child of "Hub_5"
  location (X Y Z) 1.81137 -8.908 3.86898, rotation 0 90 0; relative location 0 0 0, rotation 0 0 0
  bounding box size 8.17948 8.17948 0.783699
  Design: Diameter=9.1869 NumBlade=4 Beta34=20 UseBeta34Flag=1 Feather=3.30904 Rotate=60 Precone=0 ReverseFlag=0 FoldAngle=0 PropMode=0 AF=103.468 CLi=0.539797 Chord=0.169845 Solidity=0.216254 ConstructXoC=0.5 FeatherAxisXoC=0.5 FeatherOffsetXoC=0
  cross sections:
    n  RadiusFrac  shape
    0  0.15        ellipse Ellipse_Height=0.132171 Ellipse_Width=1.10143
    1  0.4         NACA 16-series Chord=0.912456 IdealCl=0.7 ThickChord=0.12
    2  1           NACA 16-series Chord=0.458927 IdealCl=0.2 ThickChord=0.12
  Chord along r/R (linear): 0.15: 0.239782, 1: 0.0999091
  Twist along r/R (cubic Bezier): 0.15: 41.6271, 0.185417: 42.3167, 0.220833: 37.8335, 0.25625: 34.1794, 0.291667: 30.5254, 0.327083: 28.2484, 0.3625: 26.4162, 0.433333: 22.752, 0.504167: 20.9509, 0.575: 19.4972, 0.716667: 16.59, 0.858333: 15.4417, 1: 14.4812
  Thick along r/R (linear): 0.15: 0.12, 1: 0.12
  CLI along r/R (cubic Bezier): 0.15: 0, 0.233333: 0.7, 0.316667: 0.7, 0.4: 0.7, 0.466667: 0.7, 0.533333: 0.7, 0.6: 0.7, 0.733333: 0.7, 0.866667: 0.7, 1: 0.2

Fuselage "Nacelle_5", child of "Hub_5"
  location (X Y Z) 1.81137 -8.908 5.56856, rotation 0 90 0; relative location -1.69958 0 0, rotation 0 0 0
  bounding box size 1.44694 1.44694 4.22146
  Design: Length=4.15011
  cross sections:
    n  XLocPercent  YLocPercent  ZLocPercent  shape
    0  0            0            0            circle Circle_Diameter=0.344509
    1  0.3          0            0            ellipse Ellipse_Height=1.44694 Ellipse_Width=1.44694
    2  1            0            0            as above

Blank "Hub_6", child of "Wing"
  location (X Y Z) 1.81137 8.908 3.86898, rotation 0 90 0; relative location 7.39835 8.908 1.60771, rotation 0 90 0

Propeller "Prop_6", child of "Hub_6"
  location (X Y Z) 1.81137 8.908 3.86898, rotation 0 90 0; relative location 0 0 0, rotation 0 0 0
  bounding box size 8.17948 8.17948 0.783699
  Design: Diameter=9.1869 NumBlade=4 Beta34=20 UseBeta34Flag=1 Feather=3.30904 Rotate=60 Precone=0 ReverseFlag=1 FoldAngle=0 PropMode=0 AF=103.468 CLi=0.539797 Chord=0.169845 Solidity=0.216254 ConstructXoC=0.5 FeatherAxisXoC=0.5 FeatherOffsetXoC=0
  cross sections:
    n  RadiusFrac  shape
    0  0.15        ellipse Ellipse_Height=0.132171 Ellipse_Width=1.10143
    1  0.4         NACA 16-series Chord=0.912456 IdealCl=0.7 ThickChord=0.12
    2  1           NACA 16-series Chord=0.458927 IdealCl=0.2 ThickChord=0.12
  blade curves as in "Prop_5"

Fuselage "Nacelle_6", child of "Hub_6"
  location (X Y Z) 1.81137 8.908 5.56856, rotation 0 90 0; relative location -1.69958 0 0, rotation 0 0 0
  bounding box size 1.44694 1.44694 4.22146
  Design: Length=4.15011
  cross sections:
    n  XLocPercent  YLocPercent  ZLocPercent  shape
    0  0            0            0            circle Circle_Diameter=0.344509
    1  0.3          0            0            ellipse Ellipse_Height=1.44694 Ellipse_Width=1.44694
    2  1            0            0            as above

Fuselage "Pylons", child of "Wing"
  location (X Y Z) -10.1126 -8.90761 1.74388, rotation 0 0 0; relative location -4.52566 -8.90761 -0.517391, rotation 0 0 0
  symmetric about XZ
  bounding box size 12.7403 19.2622 1.44694
  Design: Length=12.7403
  cross sections:
    n  XLocPercent  YLocPercent  ZLocPercent  shape
    0  0            0            0            circle Circle_Diameter=0.344509
    1  0            0            0            ellipse Ellipse_Height=1.44694 Ellipse_Width=1.44694
    2  1            0            0            as above
    3  1            0            0            point

Blank "NDARC_Origin", child of "Fuselage"
  location (X Y Z) -3.71299 0 2.26128, rotation 0 0 0; relative location 8.17399 0 3.42041, rotation 0 0 0

Blank "NDARC_CG", child of "NDARC_Origin"
  location (X Y Z) -3.41442 0 -0.95414, rotation 0 0 0; relative location 0.298574 0 -3.21542, rotation 0 0 0

Blank "Fuse_CG", child of "Fuselage"
  location (X Y Z) 0 0 0, rotation 0 0 0; relative location 11.887 0 1.15913, rotation 0 0 0

Blank "NDARC_Center", child of "Fuselage"
  location (X Y Z) 0 0 0, rotation 0 0 0; relative location 11.887 0 1.15913, rotation 0 0 0

User parameters
  NacelleRotation:Rot_0 = 90  (Nacelle 0 rotation in degrees)
  NacelleRotation:Rot_1 = 90  (Nacelle 1 rotation in degrees)
  NacelleRotation:Rot_4 = 90  (Nacelle 4 rotation in degrees)
  NacelleRotation:Rot_5 = 90  (Nacelle 5 rotation in degrees)
  NacelleRotation:Rot_All = 90  (All nacelle rotation in degrees)

Parameter links (A drives B)
  UserParm:NacelleRotation:Rot_0 -> Pivot_4:XForm:Y_Rel_Rotation
  UserParm:NacelleRotation:Rot_1 -> Pivot_1:XForm:Y_Rel_Rotation
  UserParm:NacelleRotation:Rot_4 -> Pivot_3:XForm:Y_Rel_Rotation
  UserParm:NacelleRotation:Rot_5 -> Pivot_2:XForm:Y_Rel_Rotation
  UserParm:NacelleRotation:Rot_All -> UserParm:NacelleRotation:Rot_0
  UserParm:NacelleRotation:Rot_All -> UserParm:NacelleRotation:Rot_1
  UserParm:NacelleRotation:Rot_All -> UserParm:NacelleRotation:Rot_4
  UserParm:NacelleRotation:Rot_All -> UserParm:NacelleRotation:Rot_5
